units           real
dimension       3
boundary        p p p
atom_style      charge

# simulation box
region          box block 0 20.0 0 20.0 0 20.0
create_box      5 box

# atoms distribution (using overlap 1.5 to prevent explosions)
create_atoms    1 random 90  12345 box overlap 1.5 maxtry 1000
create_atoms    2 random 54  23456 box overlap 1.5 maxtry 1000
create_atoms    3 random 17  34567 box overlap 1.5 maxtry 1000
create_atoms    4 random 50  45678 box overlap 1.5 maxtry 1000
create_atoms    5 random 289 56789 box overlap 1.5 maxtry 1000

# masses and charges
mass            1 40.078
mass            2 28.085
mass            3 24.305
mass            4 26.982
mass            5 15.999

set type 1 charge  0.945
set type 2 charge  1.890
set type 3 charge  0.945
set type 4 charge  1.4175
set type 5 charge -0.945

# potential
pair_style      born/coul/long 10.0 8.0
kspace_style    pppm 1.0e-4

# coefficients
pair_coeff 1 1 0.092046 0.080000 2.344000 484.046367 0.0
pair_coeff 1 2 0.072486 0.063000 1.892400 530.299498 0.0
pair_coeff 1 3 0.092046 0.080000 2.066000 312.476577 0.0
pair_coeff 1 4 0.085142 0.074000 1.957200 396.056095 0.0
pair_coeff 1 5 0.204815 0.178000 2.993500 974.646272 0.0

pair_coeff 2 2 0.052926 0.046000 1.440800 580.975430 0.0
pair_coeff 2 3 0.072486 0.063000 1.614400 342.339245 0.0
pair_coeff 2 4 0.065582 0.057000 1.505600 433.906477 0.0
pair_coeff 2 5 0.185255 0.161000 2.541900 1067.792591 0.0

pair_coeff 3 3 0.092046 0.080000 1.788000 201.720232 0.0
pair_coeff 3 4 0.085142 0.074000 1.679200 255.674845 0.0
pair_coeff 3 5 0.204815 0.178000 2.715500 629.185791 0.0

pair_coeff 4 4 0.078239 0.068000 1.570400 324.062027 0.0
pair_coeff 4 5 0.197912 0.172000 2.606700 797.495048 0.0

pair_coeff 5 5 0.317586 0.276000 3.643000 1962.274140 0.0


neighbor        2.0 bin
neigh_modify    delay 0 every 1 check yes
timestep        1.0
thermo          100
thermo_style    custom step temp press vol density pe ke etotal


# initial velocity and relaxation
velocity        all create 300.0 4928459 dist gaussian
minimize        1.0e-4 1.0e-6 100 1000

reset_timestep  0

dump            1 all atom 100 dump.slag_500.lammpstrj

# equilibrium
fix             1 all nvt temp 300.0 300.0 100.0
run             5000
unfix           1

write_data      data.slag_500_equilibrated
